// COMSOL Multiphysics 6.4.0.293 model "Joule Heated Thermal Actuator.mph"
// Joule Heating of a Microactuator — Distributed Parameter Version
// This version of the Joule Heating of a Microactuator model demonstrates how to take advantage of the distributed parameter functionality in COMSOL Multiphysics and shows how to measure the speedup.
// The example requires a Floating Network License.
// Outline of the model tree

Parameters
  htc_s = 0.04[W/(m*K)]/2[um]  // Heat transfer coefficient
  htc_us = 0.04[W/(m*K)]/100[um]  // Heat transfer coefficient, upper surface
  DV = 5[V]  // Applied voltage

Selections
  sel1: Explicit "Substrate Contact" on boundaries 10, 30, 50, 70, 76, 82

Geometry
  geom1 "Geometry 1" (3D, length unit m)
    imp1: Import
      type = native
      filename = thermal_actuator.mphbin
      meshfilename = thermal_actuator.mphbin
      lengthunittype = native
      assemblycomponentstype = native
      virtualgeometrytype = native
      objectstoimporttype = native
      layerstype = native
      netstype = native
      drillholestype = native
      padstype = native
      padattrtag = imp1.pad
      componentsstype = native
      compattrtag = imp1.component
      cellstype = native
      arcrecognitiontype = native
      simplifytype = native
      netselectionstypedom = native
      netselectionstypebnd = native
      cadselectionstypeobj = native
      cadselectionstypedom = native
      cadselectionstypebnd = native
      cadselectionstypeedg = native
      cadselectionstypepnt = native
      ecadpreviewlayertype = native
      ecadpreviewnettype = native
    fin: Finalize "Form Union"

Materials
  mat1: Common "Material 1" on all domains
    def: def "Basic"
      electricconductivity = 5e4
      relpermittivity = 4.5
      thermalconductivity = 40
      density = 2.3e3
      heatcapacity = 600

Physics
  ec: ConductiveMedia "Electric Currents" on all domains
    dependent variable V
    cucns1: CurrentConservationSolid "Current Conservation in Solids 1" (default)
    ein1: ElectricInsulation (default)
    init1: init "Initial Values 1" (default)
    gnd1: Ground on boundaries 10
    pot1: ElectricPotential on boundaries 30 | V0 = DV
  ht: HeatTransfer "Heat Transfer in Solids" on all domains
    dependent variable T
    solid1: SolidHeatTransferModel "Solid 1" (default)
    init1: init "Initial Values 1" (default)
    ins1: ThermalInsulation (default)
    hf1: HeatFluxBoundary "Heat Flux 1" on boundaries 1-3, 5-98 | HeatFluxType = ConvectiveHeatFlux; h = htc_s
    hf2: HeatFluxBoundary "Heat Flux 2" on boundaries 4 | HeatFluxType = ConvectiveHeatFlux; h = htc_us
    temp1: TemperatureBoundary "Temperature 1" on selection sel1

Multiphysics
  emh1: ElectromagneticHeating on all domains | EMHeat_physics = ec; Heat_physics = ht

Mesh
  mesh1 "Mesh 1"
    size: MeshSizeDefault | hmax = 1.92E-5; hmin = 2.4E-6; hcurve = 0.5; hnarrow = 0.6; hgrad = 1.45; hauto = 4
    ftri1: FreeTri "Free Triangular 1" on boundaries 3, 10, 30, 50, 70, 76, 82
    swe1: Sweep "Swept 1" on remaining entities

Studies
  std1 "Study 1"
    cluco: ClusterComputing | clustersettings = on; batchdir = /tmp/testusr/cscomsol4255/17pkilusuapbj
    param: Parametric "Parametric Sweep" | pname = DV; plistarr = range(5,0.5,15); punit = V; pdistrib = on
    stat: Stationary

Solver configurations
  sol1 "Solution 1" (study std1)
    v1: Variables "Dependent Variables 1"
    s1: Stationary "Stationary Solver 1"
      p1: Parametric
      se1: Segregated
        ss1: SegregatedStep "Electric Currents"
        ss2: SegregatedStep "Temperature"
        ll1: LowerLimit
      i1: Iterative
        mg1: Multigrid
      d1: Direct "Direct, heat transfer variables (ht)"

Datasets
  dset1: Solution | solution = sol1

Plots
  pg1: PlotGroup3D "Electric Potential (ec)" | data = dset1
    vol1: Volume | expr = V
  pg2: PlotGroup3D "Electric Field (ec)" | data = dset1
    mslc1: Multislice
      expr = ec.normE
      multiplanexmethod = coord
      xcoord = ec.CPx
      multiplaneymethod = coord
      ycoord = ec.CPy
      multiplanezmethod = coord
      zcoord = ec.CPz
    strmsl1: StreamlineMultislice
      expr = {ec.Ex, ec.Ey, ec.Ez}
      multiplanexmethod = coord
      xcoord = ec.CPx
      multiplaneymethod = coord
      ycoord = ec.CPy
      multiplanezmethod = coord
      zcoord = ec.CPz
      col1: Color "Color Expression 1" | expr = ec.normE
      filt1: Filter | expr = !isScalingSystemDomain
  pg3: PlotGroup3D "Temperature (ht)" | data = dset1
    vol1: Volume | expr = T
  pg4: PlotGroup1D "1D Plot Group 4" | data = dset1
    lngr1: LineGraph on edges 52 | expr = T; descr = Temperature; xdataexpr = x